*Heading
** Job name: Job-2 Model name: Model-1
** Generated by: Abaqus/CAE 6.14-2
*Preprint, echo=NO, model=NO, history=NO, contact=NO
**
** PARTS
**
*Part, name=Plaque
*Node
      1,          45.,           0.,           0.
      2,           0.,           0.,           0.
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*Element, type=R3D3
 1, 267, 210, 208
 2, 294, 263, 259
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*Element, type=R3D4
 12,  32,   1,  40, 189
 13,  32,  33,  67, 344
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*Node
    362,          45.,           0.,           0.
*Nset, nset=Plaque-RefPt_, internal
362,
*Elset, elset=Plaque, generate
   1,  337,    1
*End Part
**
*Part, name=Pot1
*Node
      1,          22.,  -6.66666651,           0.
      2,          21.,  -5.66666651,           0.
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*Element, type=S4R
 1,  1, 33, 59,  2
 2, 33, 32, 58, 59
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*Element, type=S3
428, 576, 558, 560
429, 563, 579, 550
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*Nset, nset=Set-1
   5,   7, 139, 140, 141, 142
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*Elset, elset=Set-1, generate
 576,  620,    1
*Nset, nset=Set-2
   3,   5,  60,  61,  62,  63
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*Elset, elset=Set-2, generate
 108,  427,    1
*Nset, nset=Set-3
   1,   2,   3,   4,   6,   8
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*Elset, elset=Set-3
   1,   2,   3,   4,   5,   6
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** Section: rouge
*Shell Section, elset=Set-3, material=PS-choc
0.25, 5
** Section: gris
*Shell Section, elset=Set-2, material=PS-choc
0.15, 5
** Section: vert
*Shell Section, elset=Set-1, material=PS-choc
0.5, 5
*End Part
**
**
** ASSEMBLY
**
*Assembly, name=Assembly
**
*Instance, name=Plaque-1, part=Plaque
          0., 33.3333334922791,           0.
*End Instance
**
*Instance, name=Pot1-1, part=Pot1
          0.,          40.,           0.
*End Instance
**
*Instance, name=Plaque-2, part=Plaque
          0., 73.3333320617676,           0.
*End Instance
**
*Nset, nset=Set-1, instance=Plaque-1
 362,
*Nset, nset=Set-2, instance=Plaque-2
 362,
*Elset, elset=_bas_SNEG, internal, instance=Plaque-1, generate
   1,  337,    1
*Surface, type=ELEMENT, name=bas
_bas_SNEG, SNEG
*Elset, elset=_haut_SPOS, internal, instance=Plaque-2, generate
   1,  337,    1
*Surface, type=ELEMENT, name=haut
_haut_SPOS, SPOS
*Elset, elset=_pot1bas_SNEG, internal, instance=Pot1-1, generate
 501,  575,    1
*Surface, type=ELEMENT, name=pot1bas
_pot1bas_SNEG, SNEG
*Elset, elset=_pot1haut_SPOS, internal, instance=Pot1-1, generate
 576,  620,    1
*Surface, type=ELEMENT, name=pot1haut
_pot1haut_SPOS, SPOS
*Rigid Body, ref node=Plaque-1.Plaque-RefPt_, elset=Plaque-1.Plaque
*Rigid Body, ref node=Plaque-2.Plaque-RefPt_, elset=Plaque-2.Plaque
*End Assembly
**
** MATERIALS
**
*Material, name=PS-choc
*Density
 1.12e-09,
*Elastic
1800., 0.35
*Plastic
   15.,   0.
 22.52, 0.02
 23.94, 0.04
  24.9, 0.06
 25.64, 0.08
 26.25,  0.1
 26.77, 0.12
 27.23, 0.14
 27.65, 0.16
 28.03, 0.18
 28.37,  0.2
  28.7, 0.22
   29., 0.24
 29.28, 0.26
 29.55, 0.28
  29.8,  0.3
 30.04, 0.32
 30.27, 0.34
 30.49, 0.36
  30.7, 0.38
 30.91,  0.4
  31.1, 0.42
 31.29, 0.44
 31.47, 0.46
 31.65, 0.48
 31.82,  0.5
**
** INTERACTION PROPERTIES
**
*Surface Interaction, name=IntProp-1
*Friction
 0.25,
** ----------------------------------------------------------------
**
** STEP: Step-1
**
*Step, name=Step-1, nlgeom=YES
*Dynamic, Explicit
, 0.1
*Bulk Viscosity
0.06, 1.2
**
** BOUNDARY CONDITIONS
**
** Name: BC-2 Type: Velocity/Angular velocity
*Boundary, type=VELOCITY
Set-2, 1, 1
Set-2, 2, 2, -150.
Set-2, 3, 3
Set-2, 4, 4
Set-2, 5, 5
Set-2, 6, 6
** Name: plaqueBas Type: Symmetry/Antisymmetry/Encastre
*Boundary
Set-1, ENCASTRE
**
** INTERACTIONS
**
** Interaction: Int-1
*Contact, op=NEW
*Contact Inclusions, ALL EXTERIOR
*Contact Property Assignment
 ,  , IntProp-1
**
** OUTPUT REQUESTS
**
*Restart, write, number interval=1, time marks=NO
**
** FIELD OUTPUT: F-Output-1
**
*Output, field, variable=PRESELECT
**
** HISTORY OUTPUT: H-Output-1
**
*Output, history, variable=PRESELECT
*End Step
